*Heading
** Job name: Sample_FEM Model name: SAMPLE
** Generated by: Abaqus/CAE 2022
*Preprint, echo=NO, model=NO, history=NO, contact=NO
**
** PARTS
**
*Part, name=PART-1
*Node
      1,           0.,           0.,           0.
      2,           1.,           0.,           0.
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*Element, type=C3D8
 1,  1,  2,  7,  6, 26, 27, 32, 31
 2,  2,  3,  8,  7, 27, 28, 33, 32
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*Nset, nset=NODE, generate
  1,  50,   1
*Elset, elset=FIBER, generate
  1,  16,   1
*Elset, elset=Set-3, generate
  1,  16,   1
** Section: Section-1
*Solid Section, elset=Set-3, material=Material-1
,
*End Part
**
**
** ASSEMBLY
**
*Assembly, name=Assembly
**
*Instance, name=PART-1-1, part=PART-1
*End Instance
**
*Nset, nset=Set-1, instance=PART-1-1, generate
  1,  46,   5
*Nset, nset=Set-2, instance=PART-1-1, generate
  5,  50,   5
*End Assembly
**
** MATERIALS
**
*Material, name=Material-1
*Density
 2e-09,
*Elastic
100., 0.2
** ----------------------------------------------------------------
**
** STEP: Step-1
**
*Step, name=Step-1, nlgeom=NO
*Static
1., 1., 1e-05, 1.
**
** BOUNDARY CONDITIONS
**
** Name: BC-1 Type: Displacement/Rotation
*Boundary
Set-1, 1, 1
Set-1, 2, 2
Set-1, 3, 3
** Name: BC-2 Type: Displacement/Rotation
*Boundary
Set-2, 1, 1, 1.
**
** OUTPUT REQUESTS
**
*Restart, write, frequency=0
**
** FIELD OUTPUT: F-Output-1
**
*Output, field, variable=PRESELECT
**
** HISTORY OUTPUT: H-Output-1
**
*Output, history, variable=PRESELECT
*End Step
